# OpenSim document version 40000
MarkerSet kg_gait2392_thelen2003muscle_Scale:
  Marker BLTI: tibia_l (-0.06716579 -0.2429361 -0.005971125)
  Marker BRTI: tibia_r (-0.06707259 -0.2399641 0.006661292)
  Marker C7: torso (-0.043 0.031 0) fixed=true
  Marker CHIN: head (0.1187103 -0.02290738 0.002281606) fixed=true
  Marker CLAV: torso (0.04 0.375 0) fixed=true
  Marker FBBT: tibia_l (0.01264926 -0.2904299 -0.02263178)
  Marker FLTI: tibia_l (0.01329463 -0.1789623 0.01533111)
  Marker FRBT: tibia_r (0.01163548 -0.2907635 0.02377393)
  Marker FRTI: tibia_r (0.01231617 -0.1766217 -0.01559144)
  Marker LAKI: tibia_l (0 -0.379244 0.035692) fixed=true
  Marker LANK: tibia_l (-0.018224 -0.390861 -0.039179) fixed=true
  Marker LBHD: head (-0.04904542 0.03803461 -0.04616332) fixed=true
  Marker LBWT: pelvis (-0.1899584 0.02477879 -0.03537643) fixed=true
  Marker LELB: ulna_l (-0.037785 -0.002324 0.001899) fixed=true
  Marker LELS: humerus_l (0 -0.2842 0.050179) fixed=true
  Marker LELSO: humerus_l (0 -0.285532 -0.028642) fixed=true
  Marker LFBB: femur_l (-0.06059511 -0.3189062 -0.005347363)
  Marker LFBT: femur_l (-0.09018007 -0.1792718 0.0002221493)
  Marker LFFB: femur_l (0.06975942 -0.3542516 -0.002274933)
  Marker LFFT: femur_l (0.04706064 -0.1647846 0.04469979)
  Marker LFHD: head (0.06511027 0.08698227 -0.06030583) fixed=true
  Marker LFIN: hand_l (0.004 -0.085526 -0.017653) fixed=true
  Marker LFLB: femur_l (0.01455678 -0.3333446 -0.05645907)
  Marker LFLT: femur_l (-0.01331295 -0.1582996 -0.08780353)
  Marker LFMB: femur_l (0.01316084 -0.3134179 0.05735887)
  Marker LFMT: femur_l (-0.01299328 -0.1586424 0.0815081)
  Marker LFPI: toes_l (0.0132 -0.006719 -0.051954) fixed=true
  Marker LFRM: ulna_l (-0.026274 -0.119088 -0.021099)
  Marker LFWT: pelvis (0.006 0 -0.115853)
  Marker LHAP: humerus_l (0.02412272 -0.1157708 0.03327627)
  Marker LHBA: humerus_l (-0.04399619 -0.1854899 0.01471906)
  Marker LHEB: calcn_l (0.014687 -0.023699 0.010602) fixed=true
  Marker LHEE: calcn_l (-0.013293 0.006351 0.008501) fixed=true
  Marker LHFR: humerus_l (0.04719283 -0.1714986 0.01612368)
  Marker LHME: hand_l (-0.00503 -0.168418 -0.031342) fixed=true
  Marker LHPI: hand_l (-0.035532 -0.065846 -0.000559) fixed=true
  Marker LHTH: hand_l (0.053 -0.047 0.0107) fixed=true
  Marker LHTO: humerus_l (0.0009989776 -0.1237629 -0.03495719)
  Marker LKNE: femur_l (-0.006294452 -0.4074308 -0.04564024) fixed=true
  Marker LKNI: femur_l (-0.001169212 -0.408059 0.04655466) fixed=true
  Marker LMT5: calcn_l (0.2050742 -0.001775268 -0.01051998)
  Marker LSHN: tibia_l (-0.04757908 -0.09624315 -0.05427907)
  Marker LSHO: torso (-0.009518456 0.41 0.1) fixed=true
  Marker LTIA: tibia_l (0.034805 -0.073624 -0.010959)
  Marker LTIB: tibia_l (0.029727 -0.20083 -0.012664)
  Marker LTIC: tibia_l (0.024271 -0.322845 -0.007514)
  Marker LTOE: toes_l (0.065004 7.6e-5 0.01199) fixed=true
  Marker LTOP: calcn_l (0.140229 -0.008022 -0.054751) fixed=true
  Marker LTOS: calcn_l (0.174425 0.001805 0.041132) fixed=true
  Marker LWRA: radius_l (0.054467 -0.230831 -0.021808) fixed=true
  Marker LWRB: ulna_l (-0.014457 -0.245313 -0.049271) fixed=true
  Marker NOSE: head (0.1149756 0.06705464 0.001487122) fixed=true
  Marker RAKI: tibia_r (0 -0.379244 -0.035692) fixed=true
  Marker RANK: tibia_r (-0.018224 -0.390861 0.039179) fixed=true
  Marker RBHD: head (-0.04838257 0.03939847 0.04486451) fixed=true
  Marker RBWT: pelvis (-0.1920921 0.02544124 0.04446041) fixed=true
  Marker RELB: ulna_r (-0.037785 0.002324 0.001899) fixed=true
  Marker RELS: humerus_r (0 -0.2842 -0.050179) fixed=true
  Marker RELSO: humerus_r (0 -0.285532 0.028642) fixed=true
  Marker RFBB: femur_r (-0.05903273 -0.3162025 -0.005427123)
  Marker RFBT: femur_r (-0.08316338 -0.1732924 -0.01878258)
  Marker RFFB: femur_r (0.07235484 -0.360659 0.01845259)
  Marker RFFT: femur_r (0.06101377 -0.1722578 -0.03315506)
  Marker RFHD: head (0.06441306 0.08621171 0.06131761) fixed=true
  Marker RFIN: hand_r (0.004 -0.085526 0.017653) fixed=true
  Marker RFLB: femur_r (-0.007171316 -0.3309971 0.05355496)
  Marker RFLT: femur_r (0.001008061 -0.1565528 0.08855333)
  Marker RFMB: femur_r (0.005061579 -0.3156949 -0.05992194)
  Marker RFMT: femur_r (0.00383719 -0.1641476 -0.07824171)
  Marker RFPI: toes_r (0.0132 -0.006719 0.051954) fixed=true
  Marker RFRM: ulna_r (-0.030191 -0.123749 0.027767)
  Marker RFWT: pelvis (0.006 0 0.115853)
  Marker RHAP: humerus_r (0.01787839 -0.1214276 -0.02829038)
  Marker RHBA: humerus_r (-0.04550442 -0.1871505 -0.01046938)
  Marker RHEB: calcn_r (0.014687 -0.023699 -0.010602) fixed=true
  Marker RHEE: calcn_r (-0.013293 0.006351 -0.008501) fixed=true
  Marker RHFR: humerus_r (0.04379136 -0.1976506 -0.0212247)
  Marker RHME: hand_r (-0.00503 -0.168418 0.031342) fixed=true
  Marker RHPI: hand_r (-0.035532 -0.065846 0.000559) fixed=true
  Marker RHTH: hand_r (0.053 -0.047 -0.0107) fixed=true
  Marker RHTO: humerus_r (0.003315856 -0.152483 0.03256535)
  Marker RITL: torso (0.07418486 0.285 -0.06201666) fixed=true
  Marker RITR: torso (0.07343857 0.285 0.06795137) fixed=true
  Marker RKNE: femur_r (0.002547119 -0.4100252 0.04999875) fixed=true
  Marker RKNI: femur_r (-0.004129908 -0.4023856 -0.0452848) fixed=true
  Marker RMT5: calcn_r (0.2057972 -0.002326788 0.004264847)
  Marker RSHN: tibia_r (-0.02401031 -0.1684264 0.0585792)
  Marker RSHO: torso (-0.0006585713 0.41 -0.1) fixed=true
  Marker RTIA: tibia_r (0.034805 -0.073624 0.010959)
  Marker RTIB: tibia_r (0.029727 -0.20083 0.012664)
  Marker RTIC: tibia_r (0.024271 -0.322845 0.007514)
  Marker RTOE: toes_r (0.065004 7.6e-5 -0.01199) fixed=true
  Marker RTOP: calcn_r (0.140229 -0.008022 0.054751) fixed=true
  Marker RTOS: calcn_r (0.174425 0.001805 -0.041132) fixed=true
  Marker RWRA: radius_r (0.054467 -0.230831 0.021808) fixed=true
  Marker RWRB: ulna_r (-0.014457 -0.245313 0.049271) fixed=true
  Marker THD: head (-0.01410122 0.1577208 0.0008817963) fixed=true
