# OpenSim document version 20302
ScaleTool:
  mass: 72.6 [kg]
  height: 1803.4
  age: 99
  notes: This is an example setup file for scale.exe.
  GenericModelMaker gait2392_thelen2003muscle:
    model_file: gait2392_thelen2003muscle.osim
    marker_set_file: kg_Scale_MarkerSet.xml
  ModelScaler:
    apply: true
    scaling_order: measurements
    marker_file: calib_static_markers_rotated.trc
    time_range: 1 2
    preserve_mass_distribution: true
    output_model_file: participant_kg_gait2392_thelen2003muscle_scaled_only.osim
    output_scale_file: participant_kg_gait2392_thelen2003muscle_scaleSet_applied.xml
    MeasurementSet kg_gait2392_thelen2003muscle:
      Measurement torso: apply=true
        MarkerPair: markers=(RITR RITL)
        BodyScale torso: axes=(X Y Z)
      Measurement pelvis: apply=true
        MarkerPair: markers=(RFWT LFWT)
        BodyScale pelvis: axes=(X Y Z)
      Measurement thigh_r: apply=true
        MarkerPair: markers=(RFLT RFLB)
        BodyScale femur_r: axes=(X Y Z)
        BodyScale patella_r: axes=(X Y Z)
      Measurement thigh_l: apply=true
        MarkerPair: markers=(LFLT LFLB)
        BodyScale femur_l: axes=(X Y Z)
        BodyScale patella_l: axes=(X Y Z)
      Measurement shank_r: apply=true
        MarkerPair: markers=(RTIA RANK)
        BodyScale tibia_r: axes=(X Y Z)
        BodyScale talus_r: axes=(X Y Z)
      Measurement shank_l: apply=true
        MarkerPair: markers=(LTIA LANK)
        BodyScale tibia_l: axes=(X Y Z)
        BodyScale talus_l: axes=(X Y Z)
      Measurement foot_r: apply=true
        MarkerPair: markers=(RTOE RHEE)
        BodyScale calcn_r: axes=(X Y Z)
        BodyScale toes_r: axes=(X Y Z)
      Measurement foot_l: apply=true
        MarkerPair: markers=(LTOE LHEE)
        BodyScale calcn_l: axes=(X Y Z)
        BodyScale toes_l: axes=(X Y Z)
      Measurement humerus_r: apply=true
        MarkerPair: markers=(RHTO RELSO)
        BodyScale humerus_r: axes=(X Y Z)
      Measurement humerus_l: apply=true
        MarkerPair: markers=(LHTO LELSO)
        BodyScale humerus_L: axes=(X Y Z)
      Measurement radius_r: apply=true
        MarkerPair: markers=(RELB RWRB)
        BodyScale radius_r: axes=(X Y Z)
        BodyScale ulna_r: axes=(X Y Z)
      Measurement radius_l: apply=true
        MarkerPair: markers=(LELB LWRB)
        BodyScale radius_l: axes=(X Y Z)
        BodyScale ulna_l: axes=(X Y Z)
      Measurement hand_r: apply=true
        MarkerPair: markers=(RFIN RHME)
        BodyScale hand_r: axes=(X Y Z)
      Measurement hand_l: apply=true
        MarkerPair: markers=(LFIN LHME)
        BodyScale hand_l: axes=(X Y Z)
      Measurement head: apply=true
        MarkerPair: markers=(RFHD LFHD)
        BodyScale head: axes=(X Y Z)
  MarkerPlacer:
    apply: true
    marker_file: calib_static_markers_rotated.trc
    time_range: 1 2
    output_motion_file: participant_kg_gait2392_thelen2003muscle_static_output.mot
    output_model_file: participant_kg_gait2392_thelen2003muscle_scaled_and_markerIK.osim
    max_marker_movement: -1
    IKTaskSet scale_IK_task_set:
      IKMarkerTask BLTI: apply=true weight=1
      IKMarkerTask BRTI: apply=true weight=1
      IKMarkerTask C7: apply=true weight=1
      IKMarkerTask CHIN: apply=true weight=1
      IKMarkerTask CLAV: apply=true weight=1
      IKMarkerTask FBBT: apply=true weight=1
      IKMarkerTask FLTI: apply=true weight=1
      IKMarkerTask FRBT: apply=true weight=1
      IKMarkerTask FRTI: apply=true weight=1
      IKMarkerTask LAKI: apply=true weight=1
      IKMarkerTask LANK: apply=true weight=1
      IKMarkerTask LBHD: apply=true weight=1
      IKMarkerTask LBWT: apply=true weight=1
      IKMarkerTask LELB: apply=true weight=1
      IKMarkerTask LELS: apply=true weight=1
      IKMarkerTask LELSO: apply=true weight=1
      IKMarkerTask LFBB: apply=true weight=1
      IKMarkerTask LFBT: apply=true weight=1
      IKMarkerTask LFFB: apply=true weight=1
      IKMarkerTask LFFT: apply=true weight=1
      IKMarkerTask LFHD: apply=true weight=1
      IKMarkerTask LFIN: apply=true weight=1
      IKMarkerTask LFLB: apply=true weight=1
      IKMarkerTask LFLT: apply=true weight=1
      IKMarkerTask LFMB: apply=true weight=1
      IKMarkerTask LFMT: apply=true weight=1
      IKMarkerTask LFPI: apply=true weight=1
      IKMarkerTask LFRM: apply=true weight=1
      IKMarkerTask LFWT: apply=true weight=1
      IKMarkerTask LHAP: apply=true weight=1
      IKMarkerTask LHBA: apply=true weight=1
      IKMarkerTask LHEB: apply=true weight=1
      IKMarkerTask LHEE: apply=true weight=1
      IKMarkerTask LHFR: apply=true weight=1
      IKMarkerTask LHME: apply=true weight=1
      IKMarkerTask LHPI: apply=true weight=1
      IKMarkerTask LHTH: apply=true weight=1
      IKMarkerTask LHTO: apply=true weight=1
      IKMarkerTask LKNE: apply=true weight=1
      IKMarkerTask LKNI: apply=true weight=1
      IKMarkerTask LMT5: apply=true weight=1
      IKMarkerTask LSHN: apply=true weight=1
      IKMarkerTask LSHO: apply=true weight=1
      IKMarkerTask LTIA: apply=true weight=1
      IKMarkerTask LTIB: apply=true weight=1
      IKMarkerTask LTIC: apply=true weight=1
      IKMarkerTask LTOE: apply=true weight=1
      IKMarkerTask LTOP: apply=true weight=1
      IKMarkerTask LTOS: apply=true weight=1
      IKMarkerTask LWRA: apply=true weight=1
      IKMarkerTask LWRB: apply=true weight=1
      IKMarkerTask NOSE: apply=true weight=1
      IKMarkerTask RAKI: apply=true weight=1
      IKMarkerTask RANK: apply=true weight=1
      IKMarkerTask RBHD: apply=true weight=1
      IKMarkerTask RBWT: apply=true weight=1
      IKMarkerTask RELB: apply=true weight=1
      IKMarkerTask RELS: apply=true weight=1
      IKMarkerTask RELSO: apply=true weight=1
      IKMarkerTask RFBB: apply=true weight=1
      IKMarkerTask RFBT: apply=true weight=1
      IKMarkerTask RFFB: apply=true weight=1
      IKMarkerTask RFFT: apply=true weight=1
      IKMarkerTask RFHD: apply=true weight=1
      IKMarkerTask RFIN: apply=true weight=1
      IKMarkerTask RFLB: apply=true weight=1
      IKMarkerTask RFLT: apply=true weight=1
      IKMarkerTask RFMB: apply=true weight=1
      IKMarkerTask RFMT: apply=true weight=1
      IKMarkerTask RFPI: apply=true weight=1
      IKMarkerTask RFRM: apply=true weight=1
      IKMarkerTask RFWT: apply=true weight=1
      IKMarkerTask RHAP: apply=true weight=1
      IKMarkerTask RHBA: apply=true weight=1
      IKMarkerTask RHEB: apply=true weight=1
      IKMarkerTask RHEE: apply=true weight=1
      IKMarkerTask RHFR: apply=true weight=1
      IKMarkerTask RHME: apply=true weight=1
      IKMarkerTask RHPI: apply=true weight=1
      IKMarkerTask RHTH: apply=true weight=1
      IKMarkerTask RHTO: apply=true weight=1
      IKMarkerTask RITL: apply=true weight=1
      IKMarkerTask RITR: apply=true weight=1
      IKMarkerTask RKNE: apply=true weight=1
      IKMarkerTask RKNI: apply=true weight=1
      IKMarkerTask RMT5: apply=true weight=1
      IKMarkerTask RSHN: apply=true weight=1
      IKMarkerTask RSHO: apply=true weight=1
      IKMarkerTask RTIA: apply=true weight=1
      IKMarkerTask RTIB: apply=true weight=1
      IKMarkerTask RTIC: apply=true weight=1
      IKMarkerTask RTOE: apply=true weight=1
      IKMarkerTask RTOP: apply=true weight=1
      IKMarkerTask RTOS: apply=true weight=1
      IKMarkerTask RWRA: apply=true weight=1
      IKMarkerTask RWRB: apply=true weight=1
      IKMarkerTask THD: apply=true weight=1
      IKCoordinateTask [values shared by the 5 below unless stated]: apply=true weight=1000 value_type=default_value
          value=0
      IKCoordinateTask subtalar_angle_r
      IKCoordinateTask mtp_angle_r
      IKCoordinateTask subtalar_angle_l
      IKCoordinateTask mtp_angle_l
      IKCoordinateTask lumbar_extension: apply=false value_type=manual_value
