# OpenSim document version 20302
ScaleTool:
  mass: 72.6 [kg]
  height: 1803.4
  age: 99
  notes: This is an example setup file for scale.exe.
  GenericModelMaker gait2392_thelen2003muscle:
    model_file: gait2392_thelen2003muscle.osim
    marker_set_file: kg_Scale_MarkerSet.xml
  ModelScaler:
    apply: true
    scaling_order: measurements
    marker_file: calib_static_markers_rotated.trc
    time_range: 1 2
    preserve_mass_distribution: true
    output_model_file: participant_kg_gait2392_thelen2003muscle_scaled_only.osim
    output_scale_file: participant_kg_gait2392_thelen2003muscle_scaleSet_applied.xml
    MeasurementSet kg_gait2392_thelen2003muscle:
      Measurement torso: apply=true
        MarkerPair: markers=(Torso3 Torso2)
        MarkerPair: markers=(Torso1 Torso4)
        BodyScale torso: axes=(X Y Z)
      Measurement pelvis: apply=true
        MarkerPair: markers=(Pelvis_RFemur_score Pelvis_LFemur_score)
        BodyScale pelvis: axes=(X Y Z)
      Measurement thigh_r: apply=true
        MarkerPair: markers=(Pelvis_RFemur_score RKnee)
        BodyScale femur_r: axes=(X Y Z)
        BodyScale patella_r: axes=(X Y Z)
      Measurement thigh_l: apply=true
        MarkerPair: markers=(Pelvis_LFemur_score LKnee)
        BodyScale femur_l: axes=(X Y Z)
        BodyScale patella_l: axes=(X Y Z)
      Measurement shank_r: apply=true
        MarkerPair: markers=(RFemur5 RTibia5)
        BodyScale tibia_r: axes=(X Y Z)
        BodyScale talus_r: axes=(X Y Z)
      Measurement shank_l: apply=true
        MarkerPair: markers=(LFemur5 LTibia5)
        BodyScale tibia_l: axes=(X Y Z)
        BodyScale talus_l: axes=(X Y Z)
      Measurement foot_r: apply=true
        MarkerPair: markers=(RFoot1 RFoot2)
        MarkerPair: markers=(RFoot1 RFoot3)
        BodyScale calcn_r: axes=(X Y Z)
        BodyScale toes_r: axes=(X Y Z)
      Measurement foot_l: apply=true
        MarkerPair: markers=(LFoot1 LFoot2)
        MarkerPair: markers=(LFoot1 LFoot3)
        BodyScale calcn_l: axes=(X Y Z)
        BodyScale toes_l: axes=(X Y Z)
  MarkerPlacer:
    apply: true
    marker_file: calib_static_markers_rotated.trc
    time_range: 1 2
    output_motion_file: participant_kg_gait2392_thelen2003muscle_static_output.mot
    output_model_file: participant_kg_gait2392_thelen2003muscle_scaled_and_markerIK.osim
    max_marker_movement: -1
    IKTaskSet scale_IK_task_set:
      IKMarkerTask RFoot2: apply=true weight=100
      IKMarkerTask LFoot2: apply=true weight=100
      IKMarkerTask LFoot1: apply=true weight=100
      IKMarkerTask RFemur6: apply=true weight=100
      IKMarkerTask LFemur6: apply=true weight=100
      IKMarkerTask LTibia6: apply=true weight=100
      IKMarkerTask RTibia6: apply=true weight=100
      IKMarkerTask RFoot1: apply=true weight=100
      IKMarkerTask RFemur5: apply=true weight=100
      IKMarkerTask LFemur5: apply=true weight=100
      IKMarkerTask RTibia5: apply=true weight=100
      IKMarkerTask LTibia5: apply=true weight=100
      IKMarkerTask RFoot3: apply=true weight=1
      IKMarkerTask LFoot3: apply=true weight=1
      IKMarkerTask Torso4: apply=true weight=10
      IKMarkerTask Torso2: apply=true weight=10
      IKMarkerTask Torso3: apply=true weight=10
      IKMarkerTask Torso1: apply=true weight=10
      IKMarkerTask RFemur1: apply=true weight=1
      IKMarkerTask RFemur2: apply=true weight=1
      IKMarkerTask RFemur3: apply=true weight=1
      IKMarkerTask RFemur4: apply=true weight=1
      IKMarkerTask LFemur2: apply=true weight=1
      IKMarkerTask LFemur1: apply=true weight=1
      IKMarkerTask LFemur4: apply=true weight=1
      IKMarkerTask LFemur3: apply=true weight=1
      IKMarkerTask RTibia1: apply=true weight=1
      IKMarkerTask RTibia2: apply=true weight=1
      IKMarkerTask RTibia3: apply=true weight=1
      IKMarkerTask RTibia4: apply=true weight=1
      IKMarkerTask LTibia2: apply=true weight=1
      IKMarkerTask LTibia1: apply=true weight=1
      IKMarkerTask LTibia4: apply=true weight=1
      IKMarkerTask LTibia3: apply=true weight=1
      IKMarkerTask Pelvis1: apply=true weight=100
      IKMarkerTask Pelvis4: apply=true weight=100
      IKMarkerTask Pelvis3: apply=true weight=100
      IKMarkerTask Pelvis2: apply=true weight=100
      IKMarkerTask RFoot4: apply=true weight=1
      IKMarkerTask RFoot5: apply=true weight=1
      IKMarkerTask LFoot4: apply=true weight=1
      IKMarkerTask LFoot5: apply=true weight=1
      IKMarkerTask Pelvis_LFemur_score: apply=true weight=100
      IKMarkerTask Pelvis_RFemur_score: apply=true weight=100
      IKMarkerTask RFemur_RTibia_score: apply=true weight=1
      IKMarkerTask RFemur_RTibia_sara: apply=true weight=1
      IKMarkerTask LFemur_LTibia_score: apply=true weight=1
      IKMarkerTask LFemur_LTibia_sara: apply=true weight=1
      IKMarkerTask RKnee: apply=true weight=1
      IKMarkerTask LKnee: apply=true weight=1
      IKMarkerTask RTibia_RFoot_score: apply=true weight=1
      IKMarkerTask LTibia_LFoot_score: apply=true weight=1
      IKMarkerTask RFoot1_flat: apply=true weight=1
      IKMarkerTask RFoot2_flat: apply=true weight=1
      IKMarkerTask RFoot3_flat: apply=true weight=1
      IKMarkerTask LFoot1_flat: apply=true weight=1
      IKMarkerTask LFoot2_flat: apply=true weight=1
      IKMarkerTask LFoot3_flat: apply=true weight=1
      IKMarkerTask RFoot4_flat: apply=true weight=1
      IKMarkerTask RFoot5_flat: apply=true weight=1
      IKMarkerTask LFoot4_flat: apply=true weight=1
      IKMarkerTask LFoot5_flat: apply=true weight=1
      IKMarkerTask RASIS: apply=false weight=1
      IKMarkerTask LASIS: apply=false weight=1
      IKCoordinateTask [values shared by the 5 below unless stated]: apply=true weight=1000 value_type=default_value
          value=0
      IKCoordinateTask subtalar_angle_r
      IKCoordinateTask mtp_angle_r
      IKCoordinateTask subtalar_angle_l
      IKCoordinateTask mtp_angle_l
      IKCoordinateTask lumbar_extension: apply=false value_type=manual_value
