# OpenSim document version 40000
DistanceDataReaderSettings all-distance-plus-torso-settings:
  trial_prefix: test_distance_analysis_DistanceKinematicsIMU_dist
  data_folder: resultsSensor
  ExperimentalSensors:
    ExperimentalSensor _calcn_l_imu-calcn_r_imu: name_in_model=calcn_l_imu-calcn_r_imu
    ExperimentalSensor _calcn_l_imu-femur_l_imu: name_in_model=calcn_l_imu-femur_l_imu
    ExperimentalSensor _calcn_l_imu-femur_r_imu: name_in_model=calcn_l_imu-femur_r_imu
    ExperimentalSensor _calcn_l_imu-pelvis_imu: name_in_model=calcn_l_imu-pelvis_imu
    ExperimentalSensor _calcn_l_imu-tibia_l_imu: name_in_model=calcn_l_imu-tibia_l_imu
    ExperimentalSensor _calcn_l_imu-tibia_r_imu: name_in_model=calcn_l_imu-tibia_r_imu
    ExperimentalSensor _calcn_l_imu-torso_imu: name_in_model=calcn_l_imu-torso_imu
    ExperimentalSensor _calcn_r_imu-femur_l_imu: name_in_model=calcn_r_imu-femur_l_imu
    ExperimentalSensor _calcn_r_imu-femur_r_imu: name_in_model=calcn_r_imu-femur_r_imu
    ExperimentalSensor _calcn_r_imu-pelvis_imu: name_in_model=calcn_r_imu-pelvis_imu
    ExperimentalSensor _calcn_r_imu-tibia_l_imu: name_in_model=calcn_r_imu-tibia_l_imu
    ExperimentalSensor _calcn_r_imu-tibia_r_imu: name_in_model=calcn_r_imu-tibia_r_imu
    ExperimentalSensor _calcn_r_imu-torso_imu: name_in_model=calcn_r_imu-torso_imu
    ExperimentalSensor _femur_l_imu-femur_r_imu: name_in_model=femur_l_imu-femur_r_imu
    ExperimentalSensor _femur_l_imu-pelvis_imu: name_in_model=femur_l_imu-pelvis_imu
    ExperimentalSensor _femur_l_imu-tibia_l_imu: name_in_model=femur_l_imu-tibia_l_imu
    ExperimentalSensor _femur_l_imu-tibia_r_imu: name_in_model=femur_l_imu-tibia_r_imu
    ExperimentalSensor _femur_l_imu-torso_imu: name_in_model=femur_l_imu-torso_imu
    ExperimentalSensor _femur_r_imu-pelvis_imu: name_in_model=femur_r_imu-pelvis_imu
    ExperimentalSensor _femur_r_imu-tibia_l_imu: name_in_model=femur_r_imu-tibia_l_imu
    ExperimentalSensor _femur_r_imu-tibia_r_imu: name_in_model=femur_r_imu-tibia_r_imu
    ExperimentalSensor _femur_r_imu-torso_imu: name_in_model=femur_r_imu-torso_imu
    ExperimentalSensor _pelvis_imu-tibia_l_imu: name_in_model=pelvis_imu-tibia_l_imu
    ExperimentalSensor _pelvis_imu-tibia_r_imu: name_in_model=pelvis_imu-tibia_r_imu
    ExperimentalSensor _pelvis_imu-torso_imu: name_in_model=pelvis_imu-torso_imu
    ExperimentalSensor _tibia_l_imu-tibia_r_imu: name_in_model=tibia_l_imu-tibia_r_imu
    ExperimentalSensor _tibia_l_imu-torso_imu: name_in_model=tibia_l_imu-torso_imu
    ExperimentalSensor _tibia_r_imu-torso_imu: name_in_model=tibia_r_imu-torso_imu
