# OpenSim document version 40000
DistanceWeightSet all_uniform_dweights:
  DistanceWeight radius_r_imu-radius_l_imu: weight=0.01
  DistanceWeight radius_r_imu-pelvis_imu: weight=0.01
  DistanceWeight radius_r_imu-head_imu: weight=0.01
  DistanceWeight radius_r_imu-femur_r_imu: weight=0.01
  DistanceWeight radius_r_imu-femur_l_imu: weight=0.01
  DistanceWeight radius_l_imu-pelvis_imu: weight=0.01
  DistanceWeight radius_l_imu-head_imu: weight=0.01
  DistanceWeight radius_l_imu-femur_r_imu: weight=0.01
  DistanceWeight radius_l_imu-femur_l_imu: weight=0.01
  DistanceWeight pelvis_imu-head_imu: weight=0.01
  DistanceWeight pelvis_imu-femur_r_imu: weight=0.01
  DistanceWeight pelvis_imu-femur_l_imu: weight=0.01
  DistanceWeight head_imu-femur_r_imu: weight=0.01
  DistanceWeight head_imu-femur_l_imu: weight=0.01
  DistanceWeight femur_r_imu-femur_l_imu: weight=0.01
