# OpenSim document version 40000
DistanceWeightSet all_dweights_downweight:
  DistanceWeight calcn_l_imu-calcn_r_imu: weight=0.01
  DistanceWeight calcn_l_imu-femur_l_imu: weight=0.5
  DistanceWeight calcn_l_imu-femur_r_imu: weight=0.01
  DistanceWeight calcn_l_imu-pelvis_imu: weight=0.5
  DistanceWeight calcn_l_imu-tibia_l_imu: weight=0.1
  DistanceWeight calcn_l_imu-tibia_r_imu: weight=0.01
  DistanceWeight calcn_l_imu-torso_imu: weight=0
  DistanceWeight calcn_r_imu-femur_l_imu: weight=0.01
  DistanceWeight calcn_r_imu-femur_r_imu: weight=0.5
  DistanceWeight calcn_r_imu-pelvis_imu: weight=1
  DistanceWeight calcn_r_imu-tibia_l_imu: weight=0.01
  DistanceWeight calcn_r_imu-tibia_r_imu: weight=0.1
  DistanceWeight calcn_r_imu-torso_imu: weight=0
  DistanceWeight femur_l_imu-femur_r_imu: weight=0.1
  DistanceWeight femur_l_imu-pelvis_imu: weight=0.5
  DistanceWeight femur_l_imu-tibia_l_imu: weight=0.1
  DistanceWeight femur_l_imu-tibia_r_imu: weight=0.01
  DistanceWeight femur_l_imu-torso_imu: weight=0
  DistanceWeight femur_r_imu-pelvis_imu: weight=0.5
  DistanceWeight femur_r_imu-tibia_l_imu: weight=0.01
  DistanceWeight femur_r_imu-tibia_r_imu: weight=0.1
  DistanceWeight femur_r_imu-torso_imu: weight=0
  DistanceWeight pelvis_imu-tibia_l_imu: weight=0.1
  DistanceWeight pelvis_imu-tibia_r_imu: weight=0.1
  DistanceWeight pelvis_imu-torso_imu: weight=0
  DistanceWeight tibia_l_imu-tibia_r_imu: weight=0.01
  DistanceWeight tibia_l_imu-torso_imu: weight=0
  DistanceWeight tibia_r_imu-torso_imu: weight=0
