# OpenSim document version 40000
OrientationWeightSet all_uniform_weights:
  OrientationWeight head_imu: weight=1
  OrientationWeight pelvis_imu: weight=1
  OrientationWeight femur_r_imu: weight=1
  OrientationWeight femur_l_imu: weight=1
  OrientationWeight radius_r_imu: weight=1
  OrientationWeight radius_l_imu: weight=1
