# OpenSim document version 40000
OrientationWeightSet pelvis_tibia_calcn_downweight:
  OrientationWeight pelvis_imu: weight=1
  OrientationWeight tibia_r_imu: weight=0.5
  OrientationWeight femur_r_imu: weight=0
  OrientationWeight tibia_l_imu: weight=0.5
  OrientationWeight femur_l_imu: weight=0
  OrientationWeight calcn_r_imu: weight=0.1
  OrientationWeight calcn_l_imu: weight=0.1
